// COMSOL Multiphysics 5.6.0.280 model "fresnel_equations_with_SiC_thin_film_middle_dipole_Purcell_enhancement_with_CE.mph"
// Fresnel Equations
// modeldescr_rf/fresnel_equations
// A plane electromagnetic wave propagating through free space is incident at an angle upon an infinite dielectric medium. This example computes the reflection and transmission coefficients and compares the results to those given by the Fresnel equations.
// Outline of the model tree

Parameters
  n_air = 1  // Refractive index, air
  n_slab = 1.5  // Refractive index, slab
  lda0 = 750 [nm]  // Wavelength
  f0 = c_const/lda0  // Frequency
  alpha = 0[deg]  // Angle of incidence
  beta = asin(n_air*sin(alpha)/n_slab)  // Refraction angle
  alpha_brewster = atan(n_slab/n_air)  // Brewster angle, TM only
  r_s = (n_air*cos(alpha)-n_slab*cos(beta))/(n_air*cos(alpha)+n_slab*cos(beta))  // Reflection coefficient, TE
  r_p = (n_slab*cos(alpha)-n_air*cos(beta))/(n_air*cos(beta)+n_slab*cos(alpha))  // Reflection coefficient, TM
  t_s = (2*n_air*cos(alpha))/(n_air*cos(alpha)+n_slab*cos(beta))  // Transmission coefficient, TE
  t_p = (2*n_air*cos(alpha))/(n_air*cos(beta)+n_slab*cos(alpha))  // Transmission coefficient, TM
  radius_Si_cyl = 222 [nm]
  height_Si_cyl = 222 [nm]
  domain_height = 1400 [nm]
  lambd = 500 [nm]
  bottom_layer_thick = 340 [nm]
  n_SiC = 2.5538+0.0342*(sc^2)/((lda0*10^6)^2)
  sc = 1[m]
  eps_SiC = n_SiC^2
  mesh_max = lambd/8
  eps_Si = eps_Si_real(lda0) - i*eps_Si_imag(lda0)
  n_diamond = 2.4
  radius_sph = 5 [nm]
  eps_diamond = n_diamond^2
  z_separation = 50 [nm]
  theta = 0 [deg]
  phi = 0 [deg]
  z_NA025 = ht_dipole + lda0_middle
  ht_dipole = (-domain_height/2 + bottom_layer_thick)+height_Si_cyl/2
  x_NA025 = del_z_NA*tan(pi*14.48/180)
  del_z_NA = z_NA025 - ht_dipole
  lda0_middle = 860 [nm]

Functions
  int1: Interpolation "Eps_Si_real"
    isexcel = on
    funcname = eps_Si_real
    table = 
      {0.0000002066, -7.442181}
      {0.0000002101, -7.719435}
      {0.0000002138, -7.988336}
      {0.0000002175, -8.327804}
      {0.0000002214, -8.723427}
      {0.0000002254, -9.107604}
      {0.0000002296, -9.166115}
      {0.0000002339, -8.749368}
      {0.0000002384, -8.724395}
      {0.0000002431, -9.29}
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    interp = cubicspline
    extrap = linear
    argunit = m
    fununit = 1
  int2: Interpolation "Eps_Si_imag"
    isexcel = on
    funcname = eps_Si_imag
    table = 
      {0.0000002066, 5.87618}
      {0.0000002101, 6.459012}
      {0.0000002138, 6.89997}
      {0.0000002175, 7.40064}
      {0.0000002214, 7.995764}
      {0.0000002254, 8.84936}
      {0.0000002296, 9.902772}
      {0.0000002339, 10.588774}
      {0.0000002384, 10.659012}
      {0.0000002431, 10.773918}
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    interp = cubicspline
    extrap = linear
    argunit = m
    fununit = 1

Variables
  var1 "Variables 1"
    k_0 = emw.k0
    k_x = k_0*sin(theta)*cos(phi)
    k_y = k_0*sin(theta)*sin(phi)
    k_z = k_0*cos(theta)

Selections
  emw_dst_pc1: Explicit "Destination selection for 'Periodic Condition 1 (emw)'" on boundaries 23-25
  emw_dst_pc2: Explicit "Destination selection for 'Periodic Condition 2 (emw)'" on boundaries 11-13

Geometry
  geom1 "Geometry 1" (3D, length unit m)
    blk1: Block
      base = center
      size = {1.0*lambd, 1.0*lambd, domain_height}
      layername = Layer 1
      layer = bottom_layer_thick
    blk3: Block "SiC_thin_film"
      pos = {-(1.0*lambd/2), -(1.0*lambd/2), -domain_height/2 + bottom_layer_thick}
      size = {1.0*lambd, 1.0*lambd, height_Si_cyl}
    cyl1: Cylinder (disabled) | pos = {0, 0, -domain_height/2 + bottom_layer_thick}; r = radius_Si_cyl; h = height_Si_cyl
    sph1: Sphere | pos = {0, 0, (-domain_height/2 + bottom_layer_thick)+height_Si_cyl/2}; r = radius_sph
    pt1: Point "Electric Dipole" | p = {, , (-domain_height/2 + bottom_layer_thick)+height_Si_cyl/2}
    wp1: WorkPlane | quickz = z_NA025; unite = on
      c1: Circle | r = x_NA025
    blk2: Block
      base = center
      size = {1.0*lambd, 1.0*lambd, domain_height}
      layername = Layer 1
      layer = bottom_layer_thick
    int1: Intersection | input = blk2, wp1
    fin: Finalize "Form Union"

Materials
  mat1: Common "Air" on domains 3
    RefractiveIndex
      n = n_air
      ki = 0
  mat2: Common "Glass" on domains 1
    def "Basic"
      relpermeability = 1
      electricconductivity = 0
    RefractiveIndex
      n = n_slab
      ki = 0
  mat4: Common "SiC" on domains 2, 4
    def "Basic"
      relpermeability = 1
      electricconductivity = 0
      relpermittivity = eps_SiC

Physics
  emw: ElectromagneticWaves "Electromagnetic Waves, Frequency Domain" on all domains
    dependent variable E = {Ex, Ey, Ez}
    MeshControl.SizeControlParameter = Frequency
    MeshControl.PhysicsControlledMeshMaximumFrequency = f0
    MeshControl.EnableMeshControl = true
    AnalysisMethodology.MethodologyOptions = Fast
    wee1: WaveEquationElectric (default) | DisplacementFieldModel = RefractiveIndex
    pec1: PerfectElectricConductor (default)
    init1: init "Initial Values 1" (default)
    sctr1: Scattering "Scattering Boundary Condition 1" on boundaries 3, 10 | Order = SecondOrder
    wee2: WaveEquationElectric (disabled) on domains 2
      epsilonr_mat = userdef
      epsilonr = eps_Si_real(lda0)-i*eps_Si_imag(lda0)
    epd1: ElectricPointDipole on points 14 | enpI = {1, 0, 0}; normpI = 1
    port1: Port (disabled) on boundaries 10
      PortExcitation = on
      PortType = Periodic
      InputType = H
      Eampl = {0, 1, 0}
      Hampl = {0, 1, 0}
      alpha1_inc = alpha
      n = n_air
      fmax = f0
    port2: Port (disabled) on boundaries 3
      PortType = Periodic
      InputType = H
      Eampl = {0, 1, 0}
      Hampl = {0, 1, 0}
      alpha1_inc = alpha
      n = n_slab
      fmax = f0
    pc1: PeriodicCondition on boundaries 1, 4, 7, 23-25
      PeriodicType = Floquet
      Floquet_source = UserDefined
      kFloquet = {k_x, k_y, 0}
      destinationDomains: boundaries 23-25
    pc2: PeriodicCondition on boundaries 2, 5, 8, 11-13
      PeriodicType = Floquet
      Floquet_source = UserDefined
      kFloquet = {k_x, k_y, 0}
      destinationDomains: boundaries 11-13
    ffd1: FarFieldDomain on domains 1, 3
      ffc1: FarFieldCalculation on boundaries adjacent to domains 1-4

Mesh
  mesh1 "Mesh 1"
    size: MeshSizeDefault | hmax = mesh_max; hauto = 1
    size1: Size on domains 1 | hmax = mesh_max; hauto = 1
    size2: Size on domains 4 | hmax = 1[nm]; hauto = 1
    size3: Size on domains 2 | hmax = radius_Si_cyl/5; hauto = 1
    size4: Size on boundaries 4, 5, 7, 8, 12, 13, 24, 25 | hmax = mesh_max; hauto = 1
    size5: Size on boundaries 1, 2, 11, 23 | hmax = mesh_max; hauto = 1
    ftri1: FreeTri "Free Triangular 1" on boundaries 1, 4, 7
    copy1: Copy | mesh = mesh1; source = boundaries 1, 4, 7; destination = boundaries 23-25
    ftri2: FreeTri "Free Triangular 2" on boundaries 2, 5, 8
    copy2: Copy | mesh = mesh1; source = boundaries 2, 5, 8; destination = boundaries 11-13
    ftet1: FreeTet "Free Tetrahedral 1" on remaining entities

Studies
  std1 "Study 1"
    param: Parametric "Parametric Sweep" | pname = lda0; plistarr = range(750 [nm],2 [nm],950 [nm]); punit = m
    freq: Frequency "Frequency Domain" | punit = Hz; plist = f0

Solver configurations
  sol1 "Solution 1" (study std1)
    v1: Variables "Dependent Variables 1"
    s1: Stationary "Stationary Solver 1" | stol = 0.01
      p1: Parametric | pname = freq; plistarr = f0; punit = Hz; pcontinuationmode = no
      fc1: FullyCoupled | linsolver = d1
      d1: Direct "Suggested Direct Solver (emw)" | linsolver = pardiso
  sol2 "Solution 1 - Copy 1" (study std1)
  sol3 "Parametric Solutions 1" (study std1)

Datasets
  dset1: Solution | solution = sol1
  dset2: Solution | solution = sol2
  dset3: Solution | solution = sol3

Derived values
  gev1: EvalGlobal "S-parameter, S11dB (emw)" | data = dset3; table = tbl1; expr = abs(emw.S11)^2
  gev2: EvalGlobal "S-parameter, S21dB (emw)" | data = dset3; table = tbl2; expr = abs(emw.S21)^2
  int1: IntSurface "Surface Integration 1" on boundaries 15-22
    data = dset3
    table = tbl3
    expr = emw.nPoav
    unit = W
    descr = Power outflow, time average
  int2: IntSurface "Surface Integration 2" on boundaries 14
    data = dset3
    table = tbl6
    expr = emw.nPoav
    unit = W
    descr = Power outflow, time average

Tables
  tbl4: Table
    // Point Evaluation 1 (emw.normEfar)
    freq (Hz) | Far-field norm (V/m), Point: 17
    4.68426e+14 | 2.85741e+08
  tbl5: Table
    // Point Evaluation 2 (emw.normEfar)
    freq (Hz) | Far-field norm (V/m), Point: 13
    4.68426e+14 | 3.68978e+08

Plots
  pg1: PlotGroup3D "Electric Field (emw)" | data = dset2
    mslc1: Multislice | expr = emw.Ey; descr = Electric field, y component; xnumber = 0; znumber = 0
    arwv1: ArrowVolume | expr = {emw.Poavx, emw.Poavy, emw.Poavz}; descr = Power flow, time average; ynumber = 1
  pg2: PlotGroup1D "Reflection and Transmission"
    data = dset2
    xlabel = Angle of Incidence
    ylabel = Reflectance and Transmittance
    glob1: Global | expr = {abs(emw.S11)^2, abs(emw.S21)^2}; descr = {Reflectance, Transmittance}
    glob2: Global
      expr = {abs(r_s)^2, n_slab*cos(beta)/(n_air*cos(alpha))*abs(t_s)^2}
      descr = {"Reflectance, analytic", "Transmittance, analytic"}
  pg3: PlotGroup3D "Electric Field (emw) 1" | data = dset1
    mslc1: Multislice | expr = emw.Hy; descr = Magnetic field, y component; xnumber = 0; znumber = 0
    arwv1: ArrowVolume | expr = {emw.Poavx, emw.Poavy, emw.Poavz}; descr = Power flow, time average; ynumber = 1
  pg4: PlotGroup1D "Reflection and Transmission 1"
    data = dset1
    xlabel = Angle of Incidence
    ylabel = Reflectance and Transmittance
    glob1: Global | expr = {abs(emw.S11)^2, abs(emw.S21)^2}; descr = {Reflectance, Transmittance}
    glob2: Global
      expr = {abs(r_p)^2, n_slab*cos(beta)/(n_air*cos(alpha))*abs(t_p)^2}
      descr = {"Reflectance, analytic", "Transmittance, analytic"}
  pg5: PlotGroup1D "1D Plot Group 5" | data = none
    tblp1: Table "Table Graph 1" | table = tbl2; xaxisdata = auto; plotcolumninput = manual
  pg6: PlotGroup3D "Electric Field (emw) 2" | data = dset3
    mslc1: Multislice | expr = emw.normE
  pg7: PlotGroup1D "S-Parameter (emw)" | data = dset3; ylabel = S-parameter (dB)
    glob1: Global | expr = {emw.S11dB, emw.S21dB}; descr = {S11, S21}; xdata = expr; xdataexpr = lda0
  pg8: SmithGroup "Smith Plot (emw)" | data = dset3
    rgr1: ReflectionGraph | expr = emw.S11; descr = S11; title = Reflection Graph: S-parameter, Color: Frequency (GHz)
      col1: Color "Color Expression 1" | expr = emw.freq/1e9
  pg9: PlotGroup1D "1D Plot Group 9" | data = none
    tblp1: Table "Table Graph 1" | table = tbl1
  pg10: PolarGroup "Polar Plot Group 10" | data = dset1
    ff1: RadiationPattern "Far Field 1" | data = dset3; expr = emw.normEfar^2; phidisc = 100; normal = {0, -1, 0}
  pg11: PlotGroup1D "1D Plot Group 11" | data = none
    tblp1: Table "Table Graph 1" | table = tbl3; xaxisdata = auto; plotcolumninput = manual
  pg12: PlotGroup3D "3D Plot Group 12" | data = dset3
    rp1: RadiationPattern | data = dset3; expr = emw.normEfar^2; thetadisc = 180; phidisc = 90
  pg13: PlotGroup1D "1D Plot Group 13" | data = none
    tblp1: Table "Table Graph 1" | table = tbl6; xaxisdata = auto; plotcolumninput = manual

Exports
  plot1: Plot
    filename = D:\Updated_documents\Documents\Research paper writeup\IIT_Ropar_Collaboration\SiC_metasurface\SiC_results\Radiation_pattern_XZ_SiC_metasurface_on_glass_dipole_middle_870nm.txt